OpenVSP model (file version 5), 10 components.
Geometry view with OpenVSP parameter names; values to 6 digits, angles in degrees, lengths in the model's unit.
Overall bounding box: X_Min=0 X_Len=8.89 Y_Min=-12 Y_Len=24 Z_Min=-0.323111 Z_Len=2.30498

Pod "Capsula"
  location (X Y Z) 0 0 0, rotation 0 0 0
  bounding box size 1.454 0.646222 0.646222
  Design: FineRatio=4.5 Length=1.454

Fuselage "Boom"
  location (X Y Z) 1.354 0 0, rotation 0 0 0
  bounding box size 7.536 0.15 0.15
  Design: Length=7.536
  cross sections:
    n  XLocPercent  YLocPercent  ZLocPercent  shape
    0  0            0            0            ellipse Ellipse_Height=0.15 Ellipse_Width=0.15
    1  0.02         0            0            as above
    2  0.3          0            0            as above
    3  0.85         0            0            as above
    4  1            0            0            ellipse Ellipse_Height=0.12 Ellipse_Width=0.12

Fuselage "Capsula_fusel"
  location (X Y Z) 0 0 0, rotation 0 0 0
  bounding box size 1.354 0.326 0.277
  Design: Length=1.354
  cross sections:
    n  XLocPercent  YLocPercent  ZLocPercent  shape
    0  0            0            0            point
    1  0.15         0            0            ellipse Ellipse_Height=0.19 Ellipse_Width=0.22
    2  0.326352     0            0            ellipse Ellipse_Height=0.277 Ellipse_Width=0.326
    3  0.765328     0            0            ellipse Ellipse_Height=0.19 Ellipse_Width=0.22
    4  1            0            0            ellipse Ellipse_Height=0.15 Ellipse_Width=0.15

Wing "Ala"
  location (X Y Z) 1.976 0 0, rotation 0 0 0
  symmetric about XZ
  bounding box size 1.503 24 0.188564
  totals: TotalSpan=24 TotalProjectedSpan=24 TotalChord=1.503 TotalArea=36.072 TotalAR=15.9681 MAC=1.50182
  root: chord 1.503, twist 0, airfoil file "SD7032-099-88"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 BaseThickChord=0.100191 ThickChord=0.100191
  sections:
    n  Span  Root_Chord  Tip_Chord  Area    Sweep  Sweep_Location  Dihedral  Twist  Twist_Location  tip airfoil
    1  12    1.503       1.503      18.036  0      0               0         -4     0.25            as above

Wing "Cola_vertical"
  location (X Y Z) 7.498 0 0.03, rotation 90 0 0
  bounding box size 1.392 0.167116 1.879
  totals: TotalSpan=1.879 TotalProjectedSpan=1.879 TotalChord=1.253 TotalArea=2.35439 TotalAR=1.4996 MAC=1.25814
  root: chord 1.392, twist 0, NACA 4-series Camber=0 CamberLoc=0.2 ThickChord=0.12
  sections:
    n  Span   Root_Chord  Tip_Chord  Area     Sweep  Sweep_Location  Dihedral  Twist  Twist_Location  tip airfoil
    1  1.879  1.392       1.114      2.35439  0      0               0         0      0.25            as above

Wing "Cola_horizontal"
  location (X Y Z) 7.498 0 1.909, rotation 0 0 0
  symmetric about XZ
  bounding box size 1.214 4.372 0.145746
  totals: TotalSpan=4.372 TotalProjectedSpan=4.372 TotalChord=0.971 TotalArea=4.24521 TotalAR=4.50257 MAC=0.991271
  root: chord 1.214, twist 0, NACA 4-series Camber=0 CamberLoc=0.2 ThickChord=0.12
  sections:
    n  Span   Root_Chord  Tip_Chord  Area     Sweep  Sweep_Location  Dihedral  Twist  Twist_Location  tip airfoil
    1  2.186  1.214       0.728      2.12261  0      0.985714        0         0      0.25            as above

Propeller "Helice_derecha"
  location (X Y Z) 1.876 3 0, rotation 0 0 0
  bounding box size 0.0339453 0.876577 0.0871172
  Design: Diameter=0.875 NumBlade=2 Beta34=11.5 UseBeta34Flag=1 Feather=-8.5 Rotate=0 Precone=0 ReverseFlag=0 FoldAngle=0 PropMode=0 AF=151.538 CLi=0.538798 Chord=0.177656 Solidity=0.113099 ConstructXoC=0.5 FeatherAxisXoC=0.5 FeatherOffsetXoC=0
  cross sections:
    n  RadiusFrac  shape
    0  0.2         ellipse Ellipse_Height=0.0175 Ellipse_Width=0.035
    1  0.3         ellipse Ellipse_Height=0.0112246 Ellipse_Width=0.056123
    2  0.4         NACA 16-series Chord=0.0727344 IdealCl=0.7 ThickChord=0.144074
    3  1           NACA 16-series Chord=0.056875 IdealCl=0.2 ThickChord=0.03
  Chord along r/R (cubic Bezier): 0.2: 0.08, 0.333333: 0.15, 0.466667: 0.2, 0.6: 0.2, 0.716667: 0.2, 0.833333: 0.2, 0.95: 0.2, 0.966667: 0.2, 0.983333: 0.2, 1: 0.13
  Twist along r/R (PCHIP): 0.2: 46.75, 0.75: 20, 1: 13
  Thick along r/R (cubic Bezier): 0.2: 0.5, 0.233333: 0.3, 0.266667: 0.225, 0.3: 0.2, 0.4: 0.125, 0.5: 0.115, 0.6: 0.1, 0.733333: 0.075, 0.866667: 0.055, 1: 0.03
  CLI along r/R (cubic Bezier): 0.2: 0, 0.266667: 0.7, 0.333333: 0.7, 0.4: 0.7, 0.466667: 0.7, 0.533333: 0.7, 0.6: 0.7, 0.733333: 0.7, 0.866667: 0.7, 1: 0.2

Propeller "Helice_izquierda", child of "Helice_derecha"
  location (X Y Z) 1.876 -3 0, rotation 0 0 0
  bounding box size 0.0339453 0.876577 0.0871172
  Design: Diameter=0.875 NumBlade=2 Beta34=11.5 UseBeta34Flag=1 Feather=-8.5 Rotate=0 Precone=0 ReverseFlag=0 FoldAngle=0 PropMode=0 AF=151.538 CLi=0.538798 Chord=0.177656 Solidity=0.113099 ConstructXoC=0.5 FeatherAxisXoC=0.5 FeatherOffsetXoC=0
  cross sections:
    n  RadiusFrac  shape
    0  0.2         ellipse Ellipse_Height=0.0175 Ellipse_Width=0.035
    1  0.3         ellipse Ellipse_Height=0.0112246 Ellipse_Width=0.056123
    2  0.4         NACA 16-series Chord=0.0727344 IdealCl=0.7 ThickChord=0.144074
    3  1           NACA 16-series Chord=0.056875 IdealCl=0.2 ThickChord=0.03
  blade curves as in "Helice_derecha"

Pod "Motor_derecho"
  location (X Y Z) 1.876 3 0, rotation 0 0 0
  bounding box size 0.25 0.15625 0.15625
  Design: FineRatio=3.2 Length=0.25

Pod "Motor_izquierdo", child of "Motor_derecho"
  location (X Y Z) 1.876 -3 0, rotation 0 0 0
  bounding box size 0.25 0.15625 0.15625
  Design: FineRatio=3.2 Length=0.25
